*Heading
** WCM angle verification; mm N MPa
*Node
1, 2.0, 0.0, 0.0
2, 2.2, 0.0, 0.0
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*Element, type=C3D8, elset=E1
1, 1, 2, 3, 4, 5, 6, 7, 8
*Element, type=C3D8, elset=E2
2, 9, 10, 11, 12, 13, 14, 15, 16
*Element, type=C3D8, elset=E3
3, 17, 18, 19, 20, 21, 22, 23, 24
*Element, type=C3D8, elset=E4
4, 25, 26, 27, 28, 29, 30, 31, 32
*Element, type=C3D8, elset=E5
5, 33, 34, 35, 36, 37, 38, 39, 40
*Element, type=C3D8, elset=E6
6, 41, 42, 43, 44, 45, 46, 47, 48
*Element, type=C3D8, elset=E7
7, 49, 50, 51, 52, 53, 54, 55, 56
*Element, type=C3D8, elset=E8
8, 57, 58, 59, 60, 61, 62, 63, 64
*Element, type=C3D8, elset=E9
9, 65, 66, 67, 68, 69, 70, 71, 72
*Element, type=C3D8, elset=E10
10, 73, 74, 75, 76, 77, 78, 79, 80
*Element, type=C3D8, elset=E11
11, 81, 82, 83, 84, 85, 86, 87, 88
*Element, type=C3D8, elset=E12
12, 89, 90, 91, 92, 93, 94, 95, 96
*Element, type=C3D8, elset=E13
13, 97, 98, 99, 100, 101, 102, 103, 104
*Element, type=C3D8, elset=E14
14, 105, 106, 107, 108, 109, 110, 111, 112
*Orientation, name=BASE, system=RECTANGULAR
0.9205048534524404, 0.39073112848927377, 0.0, -0.39073112848927377, 0.9205048534524404, 0.0
3, 0.
*Solid Section, elset=E1, material=M1, orientation=BASE
1.,
*Solid Section, elset=E2, material=M2, orientation=BASE
1.,
*Solid Section, elset=E3, material=M3, orientation=BASE
1.,
*Solid Section, elset=E4, material=M4, orientation=BASE
1.,
*Solid Section, elset=E5, material=M5, orientation=BASE
1.,
*Solid Section, elset=E6, material=M6, orientation=BASE
1.,
*Solid Section, elset=E7, material=M7, orientation=BASE
1.,
*Solid Section, elset=E8, material=M8, orientation=BASE
1.,
*Solid Section, elset=E9, material=M9, orientation=BASE
1.,
*Solid Section, elset=E10, material=M10, orientation=BASE
1.,
*Solid Section, elset=E11, material=M11, orientation=BASE
1.,
*Solid Section, elset=E12, material=M12, orientation=BASE
1.,
*Solid Section, elset=E13, material=M13, orientation=BASE
1.,
*Solid Section, elset=E14, material=M14, orientation=BASE
1.,
*Material, name=M1
*Depvar
60,
*User Material, constants=33, unsymm
141000 ,11400 ,11400 ,0.28 ,0.28 ,0.28 ,7100 ,7100
7100 ,2080 ,1250 ,60 ,290 ,110 ,110 ,110
133 ,10 ,0.5 ,1.6 ,1 ,0.9 ,0.5 ,0.0001
0.005 ,0 ,1 ,0.95 ,0.85 ,1 ,0 ,202609
2
*Material, name=M2
*Depvar
60,
*User Material, constants=33, unsymm
141000 ,11400 ,11400 ,0.28 ,0.28 ,0.28 ,7100 ,7100
7100 ,2080 ,1250 ,60 ,290 ,110 ,110 ,110
133 ,10 ,0.5 ,1.6 ,1 ,0.9 ,0.5 ,0.0001
0.005 ,0 ,1 ,0.95 ,0.85 ,1 ,0 ,202609
2
*Material, name=M3
*Depvar
60,
*User Material, constants=33, unsymm
141000 ,11400 ,11400 ,0.28 ,0.28 ,0.28 ,7100 ,7100
7100 ,2080 ,1250 ,60 ,290 ,110 ,110 ,110
133 ,10 ,0.5 ,1.6 ,1 ,0.9 ,0.5 ,0.0001
0.005 ,0 ,1 ,0.95 ,0.85 ,1 ,0 ,202609
2
*Material, name=M4
*Depvar
60,
*User Material, constants=33, unsymm
141000 ,11400 ,11400 ,0.28 ,0.28 ,0.28 ,7100 ,7100
7100 ,2080 ,1250 ,60 ,290 ,110 ,110 ,110
133 ,10 ,0.5 ,1.6 ,1 ,0.9 ,0.5 ,0.0001
0.005 ,0 ,1 ,0.95 ,0.85 ,1 ,0 ,202609
2
*Material, name=M5
*Depvar
60,
*User Material, constants=33, unsymm
141000 ,11400 ,11400 ,0.28 ,0.28 ,0.28 ,7100 ,7100
7100 ,2080 ,1250 ,60 ,290 ,110 ,110 ,110
133 ,10 ,0.5 ,1.6 ,1 ,0.9 ,0.5 ,0.0001
0.005 ,0 ,1 ,0.95 ,0.85 ,1 ,0 ,202609
2
*Material, name=M6
*Depvar
60,
*User Material, constants=33, unsymm
141000 ,11400 ,11400 ,0.28 ,0.28 ,0.28 ,7100 ,7100
7100 ,2080 ,1250 ,60 ,290 ,110 ,110 ,110
133 ,10 ,0.5 ,1.6 ,1 ,0.9 ,0.5 ,0.0001
0.005 ,0 ,1 ,0.95 ,0.85 ,1 ,0 ,202609
2
*Material, name=M7
*Depvar
60,
*User Material, constants=33, unsymm
141000 ,11400 ,11400 ,0.28 ,0.28 ,0.28 ,7100 ,7100
7100 ,2080 ,1250 ,60 ,290 ,110 ,110 ,110
133 ,10 ,0.5 ,1.6 ,1 ,0.9 ,0.5 ,0.0001
0.005 ,0 ,1 ,0.95 ,0.85 ,1 ,0 ,202609
2
*Material, name=M8
*Depvar
60,
*User Material, constants=33, unsymm
141000 ,11400 ,11400 ,0.28 ,0.28 ,0.28 ,7100 ,7100
7100 ,2080 ,1250 ,60 ,290 ,110 ,110 ,110
133 ,10 ,0.5 ,1.6 ,1 ,0.9 ,0.5 ,0.0001
0.005 ,90 ,1 ,0.95 ,0.85 ,1 ,0 ,202609
2
*Material, name=M9
*Depvar
60,
*User Material, constants=33, unsymm
141000 ,11400 ,11400 ,0.28 ,0.28 ,0.28 ,7100 ,7100
7100 ,2080 ,1250 ,60 ,290 ,110 ,110 ,110
133 ,10 ,0.5 ,1.6 ,1 ,0.9 ,0.5 ,0.0001
0.005 ,90 ,1 ,0.95 ,0.85 ,1 ,0 ,202609
2
*Material, name=M10
*Depvar
60,
*User Material, constants=33, unsymm
141000 ,11400 ,11400 ,0.28 ,0.28 ,0.28 ,7100 ,7100
7100 ,2080 ,1250 ,60 ,290 ,110 ,110 ,110
133 ,10 ,0.5 ,1.6 ,1 ,0.9 ,0.5 ,0.0001
0.005 ,90 ,1 ,0.95 ,0.85 ,1 ,0 ,202609
2
*Material, name=M11
*Depvar
60,
*User Material, constants=33, unsymm
141000 ,11400 ,11400 ,0.28 ,0.28 ,0.28 ,7100 ,7100
7100 ,2080 ,1250 ,60 ,290 ,110 ,110 ,110
133 ,10 ,0.5 ,1.6 ,1 ,0.9 ,0.5 ,0.0001
0.005 ,90 ,1 ,0.95 ,0.85 ,1 ,0 ,202609
2
*Material, name=M12
*Depvar
60,
*User Material, constants=33, unsymm
141000 ,11400 ,11400 ,0.28 ,0.28 ,0.28 ,7100 ,7100
7100 ,2080 ,1250 ,60 ,290 ,110 ,110 ,110
133 ,10 ,0.5 ,1.6 ,1 ,0.9 ,0.5 ,0.0001
0.005 ,90 ,1 ,0.95 ,0.85 ,1 ,0 ,202609
2
*Material, name=M13
*Depvar
60,
*User Material, constants=33, unsymm
141000 ,11400 ,11400 ,0.28 ,0.28 ,0.28 ,7100 ,7100
7100 ,2080 ,1250 ,60 ,290 ,110 ,110 ,110
133 ,10 ,0.5 ,1.6 ,1 ,0.9 ,0.5 ,0.0001
0.005 ,90 ,1 ,0.95 ,0.85 ,1 ,0 ,202609
2
*Material, name=M14
*Depvar
60,
*User Material, constants=33, unsymm
141000 ,11400 ,11400 ,0.28 ,0.28 ,0.28 ,7100 ,7100
7100 ,2080 ,1250 ,60 ,290 ,110 ,110 ,110
133 ,10 ,0.5 ,1.6 ,1 ,0.9 ,0.5 ,0.0001
0.005 ,90 ,1 ,0.95 ,0.85 ,1 ,0 ,202609
2
*Step, name=LOAD, inc=1000, nlgeom=NO
*Static
0.01, 1., 1e-8, 0.01
*Boundary
1, 1, 1, 0
1, 2, 2, 0
1, 3, 3, 0
2, 1, 1, 0.003218325428375
2, 2, 2, 0.0018415098888669
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112, 3, 3, -0.00078146225697855
*Output, field, frequency=1
*Element Output
S, E
SDV1, SDV2, SDV3, SDV4, SDV5, SDV6, SDV7, SDV8
*Node Output
U, RF
*End Step
